// COMSOL Multiphysics 5.4.0.295 model "COMSOL_plot_Vext_cleared.mph"
// Outline of the model tree

Parameters
  x0 = 0  // Origin.
  y0 = 0  // Origin.
  z0 = 0  // Origin.
  retina_rad = 2 [mm]  // Radius of the retina
  bath_rad = retina_rad  // Radius of the bath
  bath_h = 2 [mm]  // Height of the bath.
  epsilon_bath = 78  // Relative permittivity of water.
  sigma_bath = 1/(65 [ohm*cm])  // Conductivity of the bath.
  elec_rad = 15 [um]  // Radius of the active electrode.
  A_el = pi*elec_rad^2
  ji = 1
  retina_h = 150 [um]  // Height of the retina.
  epsilon_retina = 1.48e+07  // Relative permittivity of retina (arbitrary).
  sigma_retina = 0.08265 [S/m]  // Conductivity of the retina.
  chip_rad = 100 [um]
  I0 = 1 [uA]
  f = 25 [Hz]

Geometry
  geom11 "Geometry" (2D axisymmetric, length unit m)
    r1: Rectangle "Retina" | size = {retina_rad, retina_h}
    r3: Rectangle "Fine Mesh" | size = {105 [um], retina_h}
    r2: Rectangle "Bath" | pos = {0, retina_h}; size = {bath_rad, bath_h}
    b1: BezierPolygon "Electrode" | p = {{0, elec_rad}, {0, 0}}; degree = 1; w = {1, 1}
    fin: Finalize "Form Union"

Materials
  mat7: Common "Bath" on domains 2
    def "Basic"
      relpermittivity = epsilon_bath
      electricconductivity = sigma_bath
  mat8: Common "Retina" on domains 1, 3
    def "Basic"
      electricconductivity = sigma_retina
      relpermittivity = epsilon_retina

Physics
  distant: ConductiveMedia "stimulation" on all domains
    dependent variable V
    PortSweepSettings.zref = 50 [ohm]
    cucn1: CurrentConservation (default)
    axi1: AxialSymmetry (default)
    ein1: ElectricInsulation (default)
    init1: init "Initial Values" (default)
    gnd2: Ground "Distant Ground" on boundaries 5
    ncd1: NormalCurrentDensity on boundaries 2 | nJ = 0.5 [uA] / A_el

Mesh
  mesh14 "Mesh"
    size: MeshSizeDefault | hmax = 1.44E-4; hmin = 6.45E-7; hcurve = 0.3; hgrad = 1.3
    ftri6: FreeTri "Ultra Fine" on domains 1
      size1: Size on domains 1 | hmax = 3E-6; hauto = 1; custom = on; hgrad = 3; hnarrow = 3
    ftri4: FreeTri "Retina" on domains 3
      size1: Size on domains 3 | hmax = 4.3E-5; hmin = 1.61E-7; hgrad = 1.2; hauto = 2; hnarrow = 3
    ftri5: FreeTri "Bath" on remaining entities
      size1: Size on entire geometry | hmax = 1.44E-4; hmin = 6.45E-7; hgrad = 1.3; hnarrow = 3

Studies
  std4 "Study"
    stat: Stationary

Solver configurations
  sol1 "Solution 1" (study std4)
    v1: Variables "Dependent Variables 1"
    s1: Stationary "Stationary Solver 1"
      dDef: Direct
      fc1: FullyCoupled | linsolver = dDef

Datasets
  dset1: Solution | solution = sol1

Tables
  tbl1: Table
    // Point Evaluation 1 (V)
    j_c | t (s) | Electric potential (V), Point: (-4.96E-7, 3.105E-6, 3.165E-5) | Electric potential (V), Point: (-2.7E-7, 5.145E-6, 3.595E-5) | Electric potential (V), Point: (-5.71E-7, 5.035E-6, 3.775E-5) | Electric potential (V), Point: (-9.33E-7, 5.275E-6, 3.975E-5) | Electric potential (V), Point: (-1.86E-6, 5.415E-6, 4.165E-5) | Electric potential (V), Point: (-1.94E-6, 5.335E-6, 4.325E-5) | Electric potential (V), Point: (-6.8E-7, 5.855E-6, 4.485E-5) | Electric potential (V), Point: (-4.9E-7, 5.345E-6, 4.625E-5) | Electric potential (V), Point: (-1.38E-7, 4.915E-6, 4.755E-5) | Electric potential (V), Point: (5.5E-7, 4.805E-6, 4.965E-5)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
    1 | 0 | 2.16904e-06 | 1.84826e-06 | 1.73921e-06 | 1.62546e-06 | 1.52568e-06 | 1.44954e-06 | 1.37671e-06 | 1.31971e-06 | 1.26879e-06 | 1.18885e-06
    1 | 0.0001 | 1.99735e-05 | 1.70196e-05 | 1.60154e-05 | 1.4968e-05 | 1.40492e-05 | 1.33481e-05 | 1.26774e-05 | 1.21526e-05 | 1.16837e-05 | 1.09476e-05
    1 | 0.0002 | -1.50998e-06 | -1.28667e-06 | -1.21076e-06 | -1.13157e-06 | -1.06211e-06 | -1.00911e-06 | -9.58405e-07 | -9.18723e-07 | -8.8328e-07 | -8.2763e-07
    1 | 0.0003 | 3.90507e-07 | 3.32755e-07 | 3.13122e-07 | 2.92643e-07 | 2.74679e-07 | 2.60973e-07 | 2.4786e-07 | 2.37598e-07 | 2.28432e-07 | 2.1404e-07
    1 | 0.0004 | -1.5545e-05 | -1.32461e-05 | -1.24645e-05 | -1.16493e-05 | -1.09342e-05 | -1.03886e-05 | -9.86663e-06 | -9.45812e-06 | -9.09324e-06 | -8.52033e-06
    1 | 0.0005 | -1.70588e-06 | -1.4536e-06 | -1.36784e-06 | -1.27838e-06 | -1.1999e-06 | -1.14003e-06 | -1.08275e-06 | -1.03792e-06 | -9.97877e-07 | -9.35007e-07
    1 | 0.0006 | 1.21332e-05 | 1.03389e-05 | 9.72886e-06 | 9.09256e-06 | 8.53442e-06 | 8.10855e-06 | 7.70113e-06 | 7.38228e-06 | 7.09749e-06 | 6.65032e-06
    1 | 0.0007 | 2.59723e-05 | 2.21313e-05 | 2.08256e-05 | 1.94635e-05 | 1.82687e-05 | 1.73571e-05 | 1.6485e-05 | 1.58025e-05 | 1.51928e-05 | 1.42356e-05
    1 | 0.0008 | -6.68796e-06 | -5.69888e-06 | -5.36264e-06 | -5.01191e-06 | -4.70425e-06 | -4.46951e-06 | -4.24494e-06 | -4.06918e-06 | -3.9122e-06 | -3.66572e-06
    1 | 0.0009 | 1.54546e-05 | 1.31691e-05 | 1.23921e-05 | 1.15816e-05 | 1.08707e-05 | 1.03282e-05 | 9.80926e-06 | 9.40313e-06 | 9.04037e-06 | 8.4708e-06
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
Plots
  pg1: PlotGroup2D "2D Plot Group 1" | data = dset1
    surf1: Surface | expr = V

Exports
  data1: Data
    data = dset1
    expr = V
    filename = Z:\berens\project_bipolarcells\_figures\Figure - Vext Introduction\Vext\Vext_simple.csv
    location = grid
    gridx2 = range(0,1,200) [um]
    gridy2 = range(0,1,200) [um]