// COMSOL Multiphysics 5.4.0.295 model "step3_flat_w_validate_cleared.mph"
// Outline of the model tree

Parameters
  x0 = 0  // Origin.
  y0 = 0  // Origin.
  z0 = 0  // Origin.
  bath_rad = 2 [mm]  // Radius of the bath
  bath_h = 2 [mm]  // Height of the bath.
  epsilon_bath = 78  // Relative permittivity of water.
  sigma_bath = 1/(65 [ohm*cm])  // Conductivity of the bath.
  elec_rad = 15 [um]  // Radius of the active electrode.
  A_el = pi*elec_rad^2
  A2x2 = 4*A_el
  r_2x2_eq = sqrt(A2x2/pi)
  A2x2_check = pi*r_2x2_eq^2
  idx = 1
  retina_h = 105 [um]
  f0 = 25 [Hz]
  V0 = 100 [mV]

Functions
  int1: Interpolation "25 Hz 600 mV" | funcs = {I_25_600, 1}; source = file; filename = ..\data_preprocessed\COMSOL\ret25Hz_600.txt; argunit = ms; fununit = uA
  int2: Interpolation "25 Hz 500 mV" | funcs = {I_25_500, 1}; source = file; filename = ..\data_preprocessed\COMSOL\ret25Hz_500.txt; argunit = ms; fununit = uA
  int3: Interpolation "25 Hz 400 mV" | funcs = {I_25_400, 1}; source = file; filename = ..\data_preprocessed\COMSOL\ret25Hz_400.txt; argunit = ms; fununit = uA
  int4: Interpolation "25 Hz 300 mV" | funcs = {I_25_300, 1}; source = file; filename = ..\data_preprocessed\COMSOL\ret25Hz_300.txt; argunit = ms; fununit = uA
  int5: Interpolation "25 Hz 200 mV" | funcs = {I_25_200, 1}; source = file; filename = ..\data_preprocessed\COMSOL\ret25Hz_200.txt; argunit = ms; fununit = uA
  int6: Interpolation "25 Hz 100 mV" | funcs = {I_25_100, 1}; source = file; filename = ..\data_preprocessed\COMSOL\ret25Hz_100.txt; argunit = ms; fununit = uA
  int13: Interpolation "25 Hz 30 mV" | funcs = {I_25_30, 1}; source = file; filename = ..\data_preprocessed\COMSOL\ret25Hz_30.txt; argunit = ms; fununit = uA
  int7: Interpolation "40 Hz 300 mV" | funcs = {I_40_300, 1}; source = file; filename = ..\data_preprocessed\COMSOL\ret40Hz_300.txt; argunit = ms; fununit = uA
  int8: Interpolation "40 Hz 250 mV" | funcs = {I_40_250, 1}; source = file; filename = ..\data_preprocessed\COMSOL\ret40Hz_250.txt; argunit = ms; fununit = uA
  int9: Interpolation "40 Hz 200 mV" | funcs = {I_40_200, 1}; source = file; filename = ..\data_preprocessed\COMSOL\ret40Hz_200.txt; argunit = ms; fununit = uA
  int10: Interpolation "40 Hz 150 mV" | funcs = {I_40_150, 1}; source = file; filename = ..\data_preprocessed\COMSOL\ret40Hz_150.txt; argunit = ms; fununit = uA
  int11: Interpolation "40 Hz 100 mV" | funcs = {I_40_100, 1}; source = file; filename = ..\data_preprocessed\COMSOL\ret40Hz_100.txt; argunit = ms; fununit = uA
  int12: Interpolation "40 Hz 50 mV" | funcs = {I_40_50, 1}; source = file; filename = ..\data_preprocessed\COMSOL\ret40Hz_50.txt; argunit = ms; fununit = uA
  int14: Interpolation "40 Hz 15 mV" | funcs = {I_40_15, 1}; source = file; filename = ..\data_preprocessed\COMSOL\ret40Hz_15.txt; argunit = ms; fununit = uA
  int15: Interpolation "R1" | funcs = {R1_file, 1}; source = file; filename = ..\COMSOL2python_interface\COMSOL_input\Rs.txt; nargs = 2; interp = neighbor; argunit = Hz, mV; fununit = ohm
  int16: Interpolation "C1" | funcs = {C1_file, 1}; source = file; filename = ..\COMSOL2python_interface\COMSOL_input\Cs.txt; nargs = 2; interp = neighbor; argunit = Hz, mV; fununit = F
  int19: Interpolation "er" | funcs = {er_file, 1}; source = file; filename = ..\COMSOL2python_interface\COMSOL_input\er.txt; interp = neighbor; argunit = t
  int20: Interpolation "sig" | funcs = {sig_file, 1}; source = file; filename = ..\COMSOL2python_interface\COMSOL_input\sig.txt; interp = neighbor; argunit = t; fununit = S/m

Probes
  AmMeter_circuit2_am1: GlobalVariable "Current through Ampère meter amp_wo" (disabled)
    probename = i_amp_wo
    expr = root.model_wo.circuit2.am1.i
    unit = A
    descr = Current through Ampère meter amp_wo
    table = tbl1
  AmMeter_cir_am1: GlobalVariable "Current through Ampère meter 1"
    probename = i_1
    expr = root.model_wo.cir.am1.i
    unit = A
    descr = Current through Ampère meter 1
    table = tbl1

Geometry
  geom13 "Geometry2" (2D axisymmetric, length unit m)
    r2: Rectangle "Bath" | pos = {0, retina_h}; size = {bath_rad, bath_h}
    r3: Rectangle "Retina" | size = {bath_rad, retina_h}
    r4: Rectangle "Retina 1" | size = {retina_h, retina_h}
    b1: BezierPolygon "Electrode" | p = {{0, r_2x2_eq}, {0, 0}}; degree = 1; w = {1, 1}
    fin: Finalize "Form Union"

Materials
  mat11: Common "Bath" on domains 2
    def "Basic"
      relpermittivity = epsilon_bath
      electricconductivity = sigma_bath
  mat12: Common "Retina" on domains 1, 3
    def "Basic"
      relpermittivity = er_file(0)
      electricconductivity = sig_file(0)

Physics
  mea2: ConductiveMedia "MEA2" on all domains
    dependent variable V
    cucn1: CurrentConservation (default) | ConstitutiveRelationDE = RelativePermittivity; materialType = nonSolid
    axi1: AxialSymmetry (default)
    ein1: ElectricInsulation (default)
    init1: init "Initial Values2" (default)
    gnd2: Ground "Distant Ground2" on boundaries 5 | constraintType = symmetricConstraint; constraintMethod = elemental
    term1: Terminal on boundaries 2 | TerminalType = Circuit
  cir: Circuit "Electrical Circuit"
    dependent variable voltages
    gnd1: GroundNode
    V1: VoltageSource "Voltage Source V1" | Connections = {0, 2}; sourceType = SineSource; value = V0; freq = f0
    C1: Capacitor "Capacitor C1" | C = C1_file(f0, V0); Connections = {2, 3}
    R1: Resistor "Resistor R1" | R = R1_file(f0, V0); Connections = {2, 3}
    IvsU1: ModelDeviceIV "External I Vs. U" | V_src = root.model_wo.mea2.V0_1; Connections = {3, 4}
    am1: AmMeter "Ampère Meter 1" | Connections = {0, 4}

Mesh
  mesh17 "Mesh"
    size: MeshSizeDefault | hmax = 1.41E-4; hmin = 6.32E-7; hcurve = 0.3; hgrad = 1.3
    ftri5: FreeTri "Coarse" on domains 2, 3
      size1: Size on domains 2, 3 | hauto = 3
    ftri6: FreeTri "Fine" on domains 1
      size1: Size on domains 1, 3 | hauto = 1

Studies
  std1 "Study"
    param: Parametric "Parametric Sweep"
      pname = {f0, V0}
      plistarr = {"25, 25, 25,25, 25, 25, 40,40,40,40,40, 40", "100, 200, 300, 400, 500, 600, 50,100, 150, 200, 250, 300"}
      punit = {Hz, mV}
    time: Transient "Time Dependent" | tlist = range(0,0.00002,0.12); mesh = {geom13, mesh17}

Solver configurations
  sol1 "Solution 1" (study std1)
    v1: Variables "Dependent Variables 1"
    t1: Time "Time-Dependent Solver 1" | tlist = range(0,0.00002,0.12)
      dDef: Direct
      fc1: FullyCoupled | linsolver = dDef
  sol2 "Parametric Solutions 1" (study std1)

Datasets
  dset1: Solution | solution = sol1
  dset2: Solution | solution = sol2
  dset3: Solution "Probe Solution 3" | solution = sol1

Derived values
  gev1: EvalGlobal "Current through Ampère meter 1" | data = dset3; table = tbl1; expr = root.model_wo.cir.am1.i

Tables
  tbl1: Table "Probe Table 1"
    Time (s) | Current through Ampère meter 1 (A)
    0 | 0
    1.875e-06 | 3.65084e-07
    3.75e-06 | 4.67449e-07
    7.5e-06 | 5.11748e-07
    1.5e-05 | 5.40985e-07
    3e-05 | 5.73169e-07
    4.5e-05 | 5.95018e-07
    7.5e-05 | 6.21608e-07
    0.000105 | 6.4023e-07
    0.000165 | 6.66573e-07
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
Plots
  pg1: PlotGroup1D "Probe Plot Group 1"
    tblp1: Table "Probe Table Graph 1" | table = tbl1

Exports
  tbl1: Table | table = tbl1; filename = ..\COMSOL2python_interface\COMSOL_output\v_EDL_RC_w.txt