// COMSOL Multiphysics 5.4.0.295 model "1x1_cleared.mph"
// Outline of the model tree

Parameters
  x0 = 0  // Origin
  y0 = 0  // Origin
  z0 = 0  // Origin
  retina_rad = 2 [mm]
  bath_h = 2 [mm]  // Height of humour.
  epsilon_bath = 78  // Taken from water.
  sigma_bath = 1 / (65 [ohm * cm])  // Conductivity.
  elec_rad = 15 [um]  // Radius of electrode.
  pixel = 70 [um]  // Width of pixel.
  AxA = 1  // Number of pixels in x direction.
  bath_rad = retina_rad  // Width of the bath.
  k = 1
  elec_A = pi*elec_rad^2
  elec_A_tot = AxA^2 * elec_A
  l_fine = 1600 [um]
  l_finer = 250 [um]
  retina_h = 105 [um]  // Height of retina.
  epsilon_retina = 10621118.826462055  // Relative permittivity of retina (arbitrary).
  sigma_retina = 0.0758119003381116 [S/m]  // Conductivity of the retina.

Functions
  int8: Interpolation "I_stim" | funcs = {I_stim, 1}; source = file; filename = I_stim.txt; nargs = 2; extrap = value; argunit = s; fununit = A

Geometry
  geom5 "Geometry" (3D, length unit m)
    cyl4: Cylinder "Retina" | r = retina_rad; h = retina_h
    wp1: WorkPlane "Electrode Surface" | unite = on
      c1: Circle "Electrode" | r = elec_rad
      if1: If | condition = AxA > 1
      mov1: Move | input = c1; displx = - (AxA/2 - 0.5) * pixel; disply = - (AxA/2 - 0.5) * pixel
      arr1: Array | input = mov1; size = {AxA, AxA}; fullsize = {AxA, AxA}; displ = {pixel, pixel}
      endif1: EndIf
    boxsel2: BoxSelection "Electrodes"
      entitydim = 2
      xmin = x0 - AxA/2 * pixel
      xmax = x0 + AxA/2 * pixel
      ymin = y0 - AxA/2 * pixel
      ymax = y0 + AxA/2 * pixel
      zmin = z0
      zmax = z0
      condition = allvertices
    blk7: Block "Fine" | pos = {x0, y0, z0 + retina_h/2}; base = center; size = {l_fine, l_fine, retina_h}
    blk12: Block "Finer" | pos = {x0, y0, z0 + retina_h/2}; base = center; size = {l_finer, l_finer, retina_h}
    cyl5: Cylinder "Bath" | pos = {x0, y0, z0 +retina_h}; r = bath_rad; h = bath_h
    fin: Finalize "Form Union"

Materials
  mat13: Common "Bath" on domains 2
    def "Basic"
      relpermittivity = epsilon_bath
      electricconductivity = sigma_bath
  mat14: Common "Retina" on domains 1, 3, 4
    def "Basic"
      electricconductivity = sigma_retina
      relpermittivity = epsilon_retina

Physics
  ec1: ConductiveMedia "Current" on all domains
    dependent variable V
    cucn1: CurrentConservation (default)
    ein1: ElectricInsulation (default)
    init1: init "Initial Values" (default)
    gnd1: Ground on boundaries 7
    ncd1: NormalCurrentDensity "Current from File" on selection geom5_boxsel2
      nJ = I_stim(t, k) / elec_A_tot
      J0 = {0, 0, j(t)}

Mesh
  mesh5 "Fine Mesh"
    size: MeshSizeDefault | hmax = 4.0E-4; hmin = 7.2E-5; hcurve = 0.6; hnarrow = 0.5; hgrad = 1.5
    ftet6: FreeTet "Finer" on domains 4
      size1: Size on domains 4 | hmax = 2e-5; hmin = 1E-6; hauto = 1; custom = on
    ftet3: FreeTet "Fine" on domains 3
      size1: Size on domains 1, 3 | hmax = 8.0E-5; hmin = 8.0E-7; hcurve = 0.2; hgrad = 1.3; hauto = 1
    ftet4: FreeTet "Retina" on domains 1
      size1: Size on domains 1 | hmax = 4.0E-4; hmin = 7.2E-5; hcurve = 0.6; hnarrow = 0.5; hgrad = 1.5
    ftet5: FreeTet "Bath" on remaining entities
      size1: Size on entire geometry | hmax = 6.0E-4; hmin = 1.12E-4; hauto = 6

Studies
  std1 "Study"
    param: Parametric "Parametric Sweep" | pname = k; plistarr = range(0,1,16)
    time: Transient "Time Dependent" | tlist = range(0,5e-5,0.015)

Solver configurations
  sol1 "Solution 1" (study std1)
    v1: Variables "Dependent Variables 1"
    t1: Time "Time-Dependent Solver 1" | tlist = range(0,5e-5,0.015)
      fc1: FullyCoupled | linsolver = i1
      i1: Iterative | linsolver = cg
        mg1: Multigrid | prefun = amg
  sol2 "Parametric Solutions 1" (study std1)
  sol3 "k=0" (study std1)
  sol4 "k=1" (study std1)
  sol5 "k=2" (study std1)
  sol6 "k=3" (study std1)
  sol7 "k=4" (study std1)
  sol8 "k=5" (study std1)
  sol9 "k=6" (study std1)
  sol10 "k=7" (study std1)
  sol11 "k=8" (study std1)
  sol12 "k=9" (study std1)
  sol13 "k=10" (study std1)
  sol14 "k=11" (study std1)
  sol15 "k=12" (study std1)
  sol16 "k=13" (study std1)
  sol17 "k=14" (study std1)
  sol18 "k=15" (study std1)
  sol19 "k=16" (study std1)

Datasets
  dset1: Solution | solution = sol2
  dset2: Solution | solution = sol1
  cpt1: CutPoint3D "center" | data = dset1; pointx = 0; pointy = 0; pointz = 0
  cpt2: CutPoint3D "cells"
    data = dset2
    method = file
    filename = Z:\berens\project_bipolarcells\step3b_thresholds\_all_neurons.csv
  cpl1: CutPlane "xy" | data = dset11; quickplane = xy; quickz = 30[um]
  dset3: Solution | solution = sol3
  dset4: Solution | solution = sol4
  dset5: Solution | solution = sol5
  dset6: Solution | solution = sol6
  dset7: Solution | solution = sol7
  dset8: Solution | solution = sol8
  dset9: Solution | solution = sol9
  dset10: Solution | solution = sol10
  dset11: Solution | solution = sol11
  dset12: Solution | solution = sol12
  dset13: Solution | solution = sol13
  dset14: Solution | solution = sol14
  dset15: Solution | solution = sol15
  dset16: Solution | solution = sol16
  dset17: Solution | solution = sol17
  dset18: Solution | solution = sol18
  dset19: Solution | solution = sol19
  cpt3: CutPoint3D "cells0" | data = dset3; method = file; filename = ../_all_neurons.csv
  cpt4: CutPoint3D "cells1" | data = dset4; method = file; filename = ../_all_neurons.csv
  cpt19: CutPoint3D "cells2" | data = dset5; method = file; filename = ../_all_neurons.csv
  cpt5: CutPoint3D "cells3" | data = dset6; method = file; filename = ../_all_neurons.csv
  cpt6: CutPoint3D "cells4" | data = dset7; method = file; filename = ../_all_neurons.csv
  cpt7: CutPoint3D "cells5" | data = dset8; method = file; filename = ../_all_neurons.csv
  cpt8: CutPoint3D "cells6" | data = dset9; method = file; filename = ../_all_neurons.csv
  cpt9: CutPoint3D "cells7" | data = dset10; method = file; filename = ../_all_neurons.csv
  cpt10: CutPoint3D "cells8" | data = dset11; method = file; filename = ../_all_neurons.csv
  cpt11: CutPoint3D "cells9" | data = dset12; method = file; filename = ../_all_neurons.csv
  cpt12: CutPoint3D "cells10" | data = dset13; method = file; filename = ../_all_neurons.csv
  cpt13: CutPoint3D "cells11" | data = dset14; method = file; filename = ../_all_neurons.csv
  cpt14: CutPoint3D "cells12" | data = dset15; method = file; filename = ../_all_neurons.csv
  cpt15: CutPoint3D "cells13" | data = dset16; method = file; filename = ../_all_neurons.csv
  cpt16: CutPoint3D "cells14" | data = dset17; method = file; filename = ../_all_neurons.csv
  cpt17: CutPoint3D "cells15" | data = dset18; method = file; filename = ../_all_neurons.csv
  cpt18: CutPoint3D "cells16" | data = dset19; method = file; filename = ../_all_neurons.csv

Plots
  pg1: PlotGroup1D "V center" | data = dset1
    ptgr1: PointGraph "V" | data = cpt1; expr = V
  pg2: PlotGroup1D "Cells" | data = dset1
    ptgr1: PointGraph "V" | data = cpt2; expr = V
  pg3: PlotGroup2D "xy" | data = cpl1
    surf1: Surface "xy" | expr = comp1.V; descr = Electric potential

Exports
  data8: Data "Vext" | data = cpt2; expr = V; filename = comsol_Vext\Vext.csv
  data9: Data | data = cpt3; expr = V; filename = comsol_Vext\Vext_k_0.csv
  data10: Data | data = cpt4; expr = V; filename = comsol_Vext\Vext_k_1.csv
  data11: Data | data = cpt19; expr = V; filename = comsol_Vext\Vext_k_2.csv
  data12: Data | data = cpt5; expr = V; filename = comsol_Vext\Vext_k_3.csv
  data13: Data | data = cpt6; expr = V; filename = comsol_Vext\Vext_k_4.csv
  data14: Data | data = cpt7; expr = V; filename = comsol_Vext\Vext_k_5.csv
  data15: Data | data = cpt8; expr = V; filename = comsol_Vext\Vext_k_6.csv
  data16: Data | data = cpt9; expr = V; filename = comsol_Vext\Vext_k_7.csv
  data17: Data | data = cpt10; expr = V; filename = comsol_Vext\Vext_k_8.csv
  data18: Data | data = cpt11; expr = V; filename = comsol_Vext\Vext_k_9.csv
  data19: Data | data = cpt12; expr = V; filename = comsol_Vext\Vext_k_10.csv
  data20: Data | data = cpt13; expr = V; filename = comsol_Vext\Vext_k_11.csv
  data21: Data | data = cpt14; expr = V; filename = comsol_Vext\Vext_k_12.csv
  data22: Data | data = cpt15; expr = V; filename = comsol_Vext\Vext_k_13.csv
  data23: Data | data = cpt16; expr = V; filename = comsol_Vext\Vext_k_14.csv
  data24: Data | data = cpt17; expr = V; filename = comsol_Vext\Vext_k_15.csv
  data25: Data | data = cpt18; expr = V; filename = comsol_Vext\Vext_k_16.csv